# координаты вершин квадрата
v_x := [-1; -1; 1; 1]*m
v_y := [-1; 1; 1; -1]*m
v_z := [0; 0; 0; 0]*m
Δx := 0 m
Δy := 0 m
Δz := 0 m
# [component: outputs ϕ]
# [component: outputs ψ]
# [component: outputs χ]
ψ := ψ*deg = 0 deg
ϕ := ϕ*deg = 0 deg
χ := χ*deg = 101 deg
# [area: platform]
M_χ := [cos(χ), -sin(χ), 0, Δx/m; sin(χ), cos(χ), 0, Δy/m; 0, 0, 1, Δz/m; 0, 0, 0, 1]
M_ϕ := [1, 0, 0, Δx/m; 0, cos(ϕ), -sin(ϕ), Δy/m; 0, sin(ϕ), cos(ϕ), Δz/m; 0, 0, 0, 1]
M_ψ := [cos(ψ), 0, sin(ψ), Δx/m; 0, 1, 0, Δy/m; -sin(ψ), 0, cos(ψ), Δz/m; 0, 0, 0, 1]
v_0 := M_ϕ*M_ψ*M_χ*[v_x[0]; v_y[0]; v_z[0]; 1 m] = [1.17244; -0.790818; 0; 1] m
v_1 := M_ϕ*M_ψ*M_χ*[v_x[1]; v_y[1]; v_z[1]; 1 m] = [-0.790818; -1.17244; 0; 1] m
v_2 := M_ϕ*M_ψ*M_χ*[v_x[2]; v_y[2]; v_z[2]; 1 m] = [-1.17244; 0.790818; 0; 1] m
v_3 := M_ϕ*M_ψ*M_χ*[v_x[3]; v_y[3]; v_z[3]; 1 m] = [0.790818; 1.17244; 0; 1] m
v1_x := [v_0[0]; v_1[0]; v_2[0]; v_3[0]] = [1.17244; -0.790818; -1.17244; 0.790818] m
v1_y := [v_0[1]; v_1[1]; v_2[1]; v_3[1]] = [-0.790818; -1.17244; 0.790818; 1.17244] m
v1_z := [v_0[2]; v_1[2]; v_2[2]; v_3[2]] = [0; 0; 0; 0] m
LIMB(O, L_h, P) :=
    L_1 ← L_h[0]
    L_2 ← L_h[1]
    L_3 ← L_h[2]
    f_0 ← acos(P[0]/sqrt(P[0]^2 + P[1]^2))
    P1 ← [sqrt(P[0]^2 + P[1]^2); P[2]]
    f_2 ←
        L_13 ← sqrt((P1[0] - L_1)^2 + (P1[1] - 0 m)^2)
        acos((L_13^2 - L_2^2 - L_3^2)/(-2*L_2*L_3))
    f_1 ←
        L_03 ← sqrt(P1[0]^2 + P1[1]^2)
        L_13 ← sqrt((P1[0] - L_1)^2 + (P1[1] - 0 m)^2)
        ϕ_03 ← acos((L_03^2 - L_1^2 - L_13^2)/(-2*L_1*L_13))
        ϕ_13 ← acos((L_3^2 - L_2^2 - L_13^2)/(-2*L_2*L_13))
        ϕ ← ϕ_03 - ϕ_13 if P[2] > 0
        ϕ ← 360 deg - ϕ_03 - ϕ_13 if P[2] < 0
        ϕ
    x ← [L_1*sin(0)*cos(f_0); L_2*sin(f_1*deg)*cos(f_0); L_3*sin(f_2)*cos(f_0)]
    x ← [O[0] + x[0]; O[0] + x[0] + x[1]; O[0] + x[0] + x[1] + x[2]]
    y ← [L_1*sin(0*deg)*sin(f_0); L_2*sin(f_1)*sin(f_0); L_3*sin(f_2)*sin(f_0)]
    y ← [O[0] + y[0]; O[0] + y[0] + y[1]; O[0] + y[0] + y[1] + y[2]]
    z ← [L_1*cos(0); L_2*cos(f_1); L_3*cos(f_2)]
    z ← [O[0] + z[0]; O[0] + z[0] + z[1]; O[0] + z[0] + z[1] + z[2]]
    return [x; y; z]
xyz := LIMB([0; 0; 0]*m, [37; 58; 79]*mm, [0; 81; 50]*mm) = [[0; 5.73216e-20; 4.05157e-18]; [0; 0.0463143; 0.111548]; [0.037; 0.071914; 0.116474]] m
L_1 := 37 mm
L_2 := 58 mm
L_3 := 79 mm
xyz[2] = [37; 71.914; 116.474] mm
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xyz[1] = [0; 46.3143; 111.548] mm
xyz[0] = [0; 5.73216e-17; 4.05157e-15] mm
# [component: inputs transpose([v1_y, v1_x, v1_z])]
